// COMSOL Multiphysics 5.5.0.359 model "checkOptimizedCoil.mph"
// Outline of the model tree

Parameters
  scWidth = 4.0[mm]
  Z0 = 6.0[cm]
  l2 = 12.0[cm]
  outerCoilHeight = 20[cm]
  outerCoilThickness = 2[cm]
  outerCoilRadius = 7[cm]
  outerCoilTurns = 40
  outerCoilCurrent = 100[A]
  minRadius = 1.5[cm]
  scThickness = 0.1[mm]
  layerAmount = 4
  stairAmount = 30
  B0 = 1[T]
  airGap = 0.05[mm]
  FMThickness = 1[mm]

Functions
  step1: Step "sig" | funcname = sig; location = 0.5; smooth = 1

Selections
  sel2: Explicit "無限要素領域" on domains 1, 5, 7-9
  sel3: Explicit "空気領域" on domains 1-5, 7-9
  sel5: Explicit "外層コイル" on domains 6
  sel6: Explicit "FM Region" on domains 3, 4
  com1: Complement "超電導領域" | entitydim = 2; input = {sel3, sel5, sel6}
  box1: Box "分散評価範囲"
    entitydim = 2
    inputent = selections
    input = {sel3}
    xmin = 0
    xmax = 2.0*minRadius
    ymin = -1.8*Z0
    ymax = 1.8*Z0

Coordinate systems
  ie1: InfiniteElement "無限要素ドメイン 1" on no domains | ScalingType = Cylindrical

Geometry
  geom1 "ジオメトリ 1" (2D axisymmetric, length unit m)
    r1: Rectangle "air"
      pos = {outerCoilRadius*1, 0}
      base = center
      layername = レイヤー 1
      layer = outerCoilRadius*0.2
      layerright = on
      layertop = on
      size = {outerCoilRadius*2, outerCoilHeight*2}
    r2: Rectangle "outerCoil" | pos = {outerCoilRadius, 0}; base = center; size = {outerCoilThickness, outerCoilHeight}
    ls1: LineSegment "線分 1" (disabled)
      specify1 = coord
      coord1 = {0, Z0}
      specify2 = coord
      coord2 = {minRadius*0.9, Z0}
    copy1: Copy "コピー 1" (disabled) | input = ls1; keep = on; specify = pos; displx = 0; disply = 0; newpos = coord
    copy2: Copy "コピー 2" (disabled) | input = ls1; specify = pos; displx = 0; disply = 0; newpos = coord
    ls2: LineSegment "線分 2" (disabled)
      specify1 = coord
      coord1 = {0, Z0 + FMThickness/2}
      specify2 = coord
      coord2 = {0, Z0 - FMThickness/2}
    ls3: LineSegment "線分 3" (disabled)
      specify1 = coord
      coord1 = {minRadius*0.9, Z0 + FMThickness/2}
      specify2 = coord
      coord2 = {minRadius*0.9, Z0 - FMThickness/2}
    csol1: ConvertToSolid "ソリッドに転換 1" (disabled) | input = copy1, copy2, ls2, ls3
    copy3: Copy "コピー 3" (disabled) | input = csol1; keep = on; specify = pos; displx = 0; disply = 0; newpos = coord
    fin: Finalize "一体化"

Materials
  mat1: Common "Air" on selection sel3
    def "Basic"
      thermalexpansioncoefficient = alpha_p(pA,T)
      molarmass = 0.02897[kg/mol]
      bulkviscosity = muB(T)
      relpermeability = 1
      relpermittivity = 1
      dynamicviscosity = eta(T)
      ratioofspecificheat = 1.4
      electricconductivity = 0[S/m]
      heatcapacity = Cp(T)
      density = rho(pA,T)
      thermalconductivity = k(T)
      soundspeed = cs(T)
      eta: Piecewise | arg = T; pieces = {200.0, 1600.0, -8.38278E-7+8.35717342E-8*T^1-7.69429583E-11*T^2+4.6437266E-14*T^3-1.06585607E-17*T^4}; argunit = K; fununit = Pa*s
      Cp: Piecewise | arg = T; pieces = {200.0, 1600.0, 1047.63657-0.372589265*T^1+9.45304214E-4*T^2-6.02409443E-7*T^3+1.2858961E-10*T^4}; argunit = K; fununit = J/(kg*K)
      rho: Analytic | expr = pA*0.02897/R_const[K*mol/J]/T; args = {pA, T}; dermethod = manual; argders = {{pA, d(pA*0.02897/R_const/T,pA)}, {T, d(pA*0.02897/R_const/T,T)}}; argunit = Pa,K; fununit = kg/m^3
      k: Piecewise | arg = T; pieces = {200.0, 1600.0, -0.00227583562+1.15480022E-4*T^1-7.90252856E-8*T^2+4.11702505E-11*T^3-7.43864331E-15*T^4}; argunit = K; fununit = W/(m*K)
      cs: Analytic | expr = sqrt(1.4*R_const[K*mol/J]/0.02897*T); args = T; dermethod = manual; argunit = K; fununit = m/s
      an1: Analytic | funcname = alpha_p; expr = -1/rho(pA,T)*d(rho(pA,T),T); args = {pA, T}; argunit = Pa,K; fununit = 1/K
      an2: Analytic "Analytic 2a" | funcname = muB; expr = 0.6*eta(T); args = T; argunit = K; fununit = Pa*s
    RefractiveIndex
      n = 1
      ki = 0
    NonlinearModel
      BA = (def.gamma+1)/2
  mat2: Common "Superconductor" on selection com1
    def "基本"
      relpermeability = 1
      relpermittivity = 1
      electricconductivity = 1e14
  mat4: Common "Copper" on selection sel5
    def "Basic"
      relpermeability = 1
      electricconductivity = 5.998e7[S/m]
      heatcapacity = 385[J/(kg*K)]
      relpermittivity = 1
      emissivity = 0.5
      density = 8940[kg/m^3]
      thermalconductivity = 400[W/(m*K)]
    Enu "Young's modulus and Poisson's ratio"
      youngsmodulus = 126e9[Pa]
      poissonsratio = 0.34
    linzRes "Linearized resistivity"
      rho0 = 1.667e-8[ohm*m]
      alpha = 3.862e-3[1/K]
      Tref = 293.15[K]

Physics
  mf: InductionCurrents "磁場" on all domains
    dependent variable A = {Ar, Aphi, Az}
    BackgroundField.SolveFor = fullField
    BackgroundField.Ab = {0, 0.5*r*B0*sig(t), 0}
    al1: AmperesLaw "アンペアの法則 1" (default)
    axi1: AxialSymmetry "軸対称 1" (default)
    mi1: MagneticInsulation "磁気絶縁 1" (default)
    init1: init "初期値 1" (default)
    coil1: Coil "outerCoil" on selection sel5
      ConductorModel = Multi
      CoilName = outerCoil
      ICoil = outerCoilCurrent
      N = outerCoilTurns
      materialType = solid
    al2: AmperesLaw "アンペアの法則 2" on selection sel6 | mur_mat = userdef; mur = 100; materialType = solid
    coil2: Coil "scCoil" on selection com1
      CoilExcitation = Voltage
      coilGroup = 1
      CoilName = scCoil
      ICoil = 1
      VCoil = 0[V]
      materialType = solid

Mesh
  mesh1 "メッシュ 1"
    size: MeshSizeDefault "サイズ" | hnarrow = 2; hauto = 1; custom = on
    ftri1: FreeTri "フリーメッシュ 3角形 1" on remaining entities

Studies
  std1 "スタディ 1"
    ccc: CoilCurrentCalculation "コイルジオメトリ解析"
    freq: Frequency "周波数領域" | plist = 1

Solver configurations
  sol1 "解 1" (study std1)
    v1: Variables "従属変数 1"
    s1: Stationary "定常ソルバー 1"
      dDef: Direct "直接"
      fcDef: FullyCoupled "強連成"
    su1: StoreSolution "解保存 1"
    v2: Variables "従属変数 2" | initmethod = sol; notsolmethod = sol
    s2: Stationary "定常ソルバー 2" | linpmethod = sol
      dDef: Direct "直接"
      p1: Parametric "パラメトリック 1" | pname = freq; plistarr = 1; punit = Hz; pcontinuationmode = no
      fc1: FullyCoupled "強連成 1" | linsolver = dDef
  sol2 "解保存 1" (study std1)

Datasets
  dset1: Solution | solution = sol1
  dset2: Solution | solution = sol2
  rev1: Revolve2D "回転2D 1" | data = dset1; startangle = -90; revangle = 225
  cln1: CutLine2D "centralAxis" | data = dset1; genpoints = {{0, 0}, {0, Z0*1.2}}; bounded = off
  cln2: CutLine2D "topLine" | data = dset1; genpoints = {{0, Z0*1.2}, {minRadius*1.8, Z0*1.2}}

Plots
  pg1: PlotGroup2D "磁束密度ノルム (mf)" | data = dset1; dataisaxisym = on
    surf1: Surface "サーフェス 1" | expr = mf.normB
    con1: Contour "コンター 1" | expr = mf.Aphi*r; levelrounding = off
  pg2: PlotGroup3D "磁場フラックス密度ノルム (回転ジオメトリ) (mf)" | data = rev1
    surf1: Surface "サーフェス 1" | expr = mf.normB
    con1: Contour "コンター 1" | expr = mf.Aphi*r; levelrounding = off

Exports
  data1: Data "データ 1"
    data = dset1
    expr = mf.normB
    unit = T
    descr = 磁束密度ノルム
    filename = C:\Users\GOD\numericalCoilOptimization\bestCoilBnormDistribution.csv
    location = grid
    gridx2 = range(0,(minRadius * 2.0-0)/399,minRadius * 2.0)
    gridy2 = range(-1.8*Z0,(1.8*Z0-(-1.8*Z0))/399,1.8*Z0)
    regulargridx2 = 1000
    regulargridy2 = 1000
    sort = on
  data2: Data "データ 2"
    data = cln1
    expr = mf.normB
    unit = T
    descr = 磁束密度ノルム
    filename = C:\Users\GOD\numericalCoilOptimization\bestCoilBnormDistributionOnAxis.csv
    location = grid
    gridx1 = range(0,(Z0*1.2-0)/399,Z0*1.2)
    gridx2 = range(0,(minRadius * 2.0-0)/399,minRadius * 2.0)
    gridy2 = range(-1.8*Z0,(1.8*Z0-(-1.8*Z0))/399,1.8*Z0)
    regulargridx2 = 1000
    regulargridy2 = 1000
    sort = on
  data3: Data "データ 3"
    data = cln2
    expr = mf.normB
    unit = T
    descr = 磁束密度ノルム
    filename = C:\Users\GOD\numericalCoilOptimization\bestCoilBnormDistributionOnTopLine.csv
    location = regulargrid
    gridx1 = range(0,(Z0-0)/399,Z0)
    gridx2 = range(0,(minRadius * 2.0-0)/399,minRadius * 2.0)
    gridy2 = range(-1.8*Z0,(1.8*Z0-(-1.8*Z0))/399,1.8*Z0)
    regulargridx1 = 400
    regulargridx2 = 1000
    regulargridy2 = 1000
    sort = on

Methods
  runProgram: CodeEditor "test"
    public class runProgram extends ApplicationMethod {
      public void execute() {
        String coilDistributionPath = "C:\\Users\\GOD\\numericalCoilOptimization\\bestCoilDistribution.csv";
        String[][] coilDistribution = readCSVFile(coilDistributionPath);
        int scAmount = 0;
        int layer = 0;
        int stair = 0;
        int _num = 0;
        // clean geometry
        for (int i = 0; i < scAmount; i++) {
          _num = i+3;
          model.component("comp1").geom("geom1").feature().remove("r"+_num);
        }
        // create geometry
        coilDistribution = readCSVFile(coilDistributionPath);
        scAmount = coilDistribution.length;
        for (int i = 0; i < scAmount; i++) {
          // get layer and stair index
          layer = toInt(coilDistribution[i][0]);
          stair = toInt(coilDistribution[i][1]);
          // create rectangle
          _num = i+3;
          model.component("comp1").geom("geom1").create("r"+_num, "Rectangle");
          model.component("comp1").geom("geom1").feature("r"+_num).label("ring"+" "+stair+" "+layer);
          with(model.component("comp1").geom("geom1").feature("r"+_num));
            set("size", new String[]{"scThickness", "1"});
            setIndex("size", "scWidth", 1);
            set("base", "center");
            set("pos", new String[]{"minRadius + (scThickness + airGap) * "+layer, "0"});
            setIndex("pos", "scWidth * ((stairAmount-1)/2 - "+stair+")", 1);
          endwith();
          model.component("comp1").geom("geom1").run("");
        }
        // create others
        //  model.component("comp1").geom("geom1").run("r2");
        model.component("comp1").geom("geom1").run("fin");
        // run
        model.study("std1").run();
        // export BzDistribution
        model.result().export("data1").run();
        model.result().export("data2").run();
        model.result().export("data3").run();
      }
    }